*Heading
** Job name: tilt30 Model name: Model-1
** Generated by: Abaqus/CAE 6.14-1
*Preprint, echo=NO, model=NO, history=NO, contact=NO
**
** PARTS
**
*Part, name=tilt30
*End Part
**
**
** ASSEMBLY
**
*Assembly, name=Assembly
**
*Instance, name=tilt30-1, part=tilt30
*Node
    1, 34.0, -60.0, 1.0
    2, 34.0636482, -59.0, 1.0
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*Element, type=C3D8R
    1,    1, 2, 3, 4, 5, 6, 7, 8,
    2,    4, 3, 9, 10, 8, 7, 11, 12,
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*Nset, nset=Set-1, generate
    1, 35042, 1
*Elset, elset=Set-1, generate
    1, 17280, 1
** Section: Section-1
*Solid Section, elset=Set-1, controls=EC-1, material=CRYSTAL
,
*End Instance
**
*Nset, nset=corner_00, instance=tilt30-1
    30836, 30835
*Nset, nset=corner_01, instance=tilt30-1
    34805, 34806
*Nset, nset=corner_10, instance=tilt30-1
    30840, 30839
*Nset, nset=corner_11, instance=tilt30-1
    34857, 34858
*Nset, nset=corner_plate, instance=tilt30-1
    30836, 34805, 30840, 34857
*End Assembly
**
** ELEMENT CONTROLS
**
*Section Controls, name=EC-1, hourglass=ENHANCED, second order accuracy=YES
1., 1., 1.
**
** MATERIALS
**
*MATERIAL,NAME=CRYSTAL
**
*USER MATERIAL,CONSTANTS=160,UNSYMM
**
** All the constants below must be real numbers!
**
**168400., 121400., 75400. ,
**    c11  ,   c12  ,   c44  , (elastic constants of copper crystal)
    58580.,   25020., 20790. , 61110., 16580.,
**    c11  ,   c12  ,  c31  ,  c33 ,   c55 (elastic constants of HCP pure Mg crystal)
**    MPa  ,   MPa  ,   MPa  ,
**
      0.   ,
** constants only used for an elastic orthotropic or anisotropic material
**    MPa  ,
**
      0.   ,
** constants only used for an elastic anisotropic material
**    MPa  ,
**
** The elastic constants above are relative to crystal axes, where
**   1 -- [100],  2 -- [010],  3 -- [001] .  These elastic constants
**   are arranged in the following order:
**   eight constants each line (data card)
**
** (1) isotropic:
**     E    ,  Nu      (Young's modulus and Poisson's ratio)
**     0.
**     0.
**
** (2) cubic:
**     c11  ,  c12  ,  c44
**     0.
**     0.
**
** (3) orthotropic:
**     D1111,  D1122,  D2222,  D1133,  D2233,  D3333,  D1212,  D1313,
**     D2233
**     0.
**
** (4) anisotropic:
**     D1111,  D1122,  D2222,  D1133,  D2233,  D3333,  D1112,  D2212,
**     D3312,  D1212,  D1113,  D2213,  D3313,  D1213,  D1313,  D1123,
**     D2223,  D3323,  D1223,  D1323,  D2323
**
**
      3.   ,
** number of sets of slip systems
**    --   ,
**
      1.   ,   1.   ,   1.   ,   1.   ,   1.   ,   0.   ,
**    normal to slip plane   ,      slip direction      , of the 1st set
**    --   ,   --   ,   --   ,   --   ,   --   ,   --   ,
**
          0.6839865,  0.0000000,  0.7294947  ,                        1.   ,       0.   ,      0.   ,
**   other crystal orientation
**    --   ,   --   ,   --   ,   --   ,   --   ,   --   ,
**
          -0.7294947,  0.0000000,  0.6839865  ,                     0.   ,       -1.   ,       0.  ,
**    other crystal orientation
**    --   ,
**
**
           0.6839865,  0.0000000,  0.7294947  ,                        0.   ,       1.   ,      0.   ,
** direction in local system ,      global system       , of the 1st vector
**    ---  ,   --   ,   --   ,   --   ,   --   ,   --   ,
** (the first vector to determine crystal orientation in global system)
**
           -0.7294947,  0.0000000,  0.6839865  ,                      1.   ,       0.   ,       0.  ,
** direction in local system ,      global system       , of the 2nd vector
**    --   ,   --   ,   --   ,   --   ,   --   ,   --   ,
** (the second vector to determine crystal orientation in global system)
**
** constraint:  The angle between two non-parallel vectors in the local
**              and global systems should be the same.  The relative
**              difference must be less than 0.1%.
**
**
      25.  ,  .001  ,
**     n   ,  adot  , of 1st set of slip systems
**    ---  ,  1/sec ,
**
      25.  ,  .001  ,
**    n    ,  adot  , of 2nd set of slip systems
**    ---  ,  1/sec ,
**
      25.  ,  .001  ,
**    n    ,  adot  , of 3rd set of slip systems
**    --   ,  1/sec ,
**
**
      30. ,   20. ,   6.  ,
**    h0   ,  taus  ,  tau0  , of 1st set of slip systems
**    MPa  ,   MPa  ,   MPa  ,
**
      1.   ,   1.   ,
**    q    ,   q1   , Latent hardening of 1st set of slip systems
**    --   ,   --   ,
**
      2500. ,  75. ,   40.  ,
**    h0   ,  taus  ,  tau0  , of 2nd set of slip systems
**    MPa  ,   MPa  ,   Mpa  ,
**
      1.   ,   1.   ,
**    q    ,   q1   , of 2nd set of slip systems
**    --   ,   --   ,
**
      3300. ,  230. ,   160.  ,
**    h0   ,  taus  ,  tau0  , of 3rd set of slip systems
**    MPa  ,   MPa  ,   MPa  ,
**
      1.   ,   1.   ,
**    q    ,   q1   , of 3rd set of slip systems
**    --   ,   --   ,
**
**
      .5   ,   1.   ,
**   THETA , NLGEOM ,
**    --   ,   --   ,
**
** THETA:  implicit integration parameter, between 0 and 1
**
** NLGEOM:  parameter determining whether finite deformation of single
**   crystal is considered
**
**   NLGEOM=0. --- small deformation
**   otherwise --- finite rotation and finite strain,  Users must
**                 declare "NLGEOM" in the input file, at the *STEP
**                 card
**
**
      0.   ,   10.  , 1.E-5  ,
**  ITRATN , ITRMAX , GAMERR ,
**    --   ,   --   ,   --   ,
** ITRATN:  parameter determining whether iteration method is used to
**   solve increments of stresses and state variables in terms of
**   strain increments
**
**   ITRATN=0. --- no iteration
**   otherwise --- iteration
**
** ITRMAX:  maximum number of iterations
**
** GAMERR:  absolute error of shear strains in slip systems
**
**
*DEPVAR
310
** ----------------------------------------------------------------
**
** STEP: Step-1
**
*Step, name=Step-1, nlgeom=YES, inc=15000
*Static
0.005, 3.0, 1.0e-08, 0.08
**
** BOUNDARY CONDITIONS
**
** Name: loading Type: Displacement/Rotation
*Boundary, user
corner_00, 1, 1, -12.0
corner_00, 2, 2, -12.0
corner_01, 1, 1, 12.0
corner_01, 2, 2, -12.0
corner_10, 1, 1, -12.0
corner_10, 2, 2, 12.0
corner_11, 1, 1, 12.0
corner_11, 2, 2, 12.0
** Name: fix Type: Displacement/Rotation
*Boundary
corner_plate, 3, 3
**
** CONTROLS
**
*Controls, parameters=time incrementation
, , , , , , , 15, , ,
**
** OUTPUT REQUESTS
**
*Restart, write, frequency=360, overlay
**
** FIELD OUTPUT: F-Output-1
**
*Output, field,FREQUENCY=2
*Node Output
  U
*Element Output, directions=YES
  S
SDV13,   SDV16,   SDV19,   SDV21
SDV207, SDV208
SDV210
SDV211
SDV212
SDV213,SDV214,SDV215,SDV216,SDV217,SDV218,SDV219
SDV221, SDV222, SDV223
SDV230, SDV231, SDV232, SDV233, SDV234, SDV235
SDV236
SDV237, SDV238
SDV239
SDV240, SDV241, SDV242, SDV243
**
** HISTORY OUTPUT: H-Output-1
**
*Output, history, variable=PRESELECT
*NODE FILE
COORD
*End Step
